<?xml version="1.0"?>


<propeller name="prop">
  <ixx> 48.0 </ixx>
  <diameter unit="IN"> 126.0 </diameter>
  <numblades> 6 </numblades>
  <gearratio>1.78 </gearratio>
  <minpitch> 20 </minpitch>
  <maxpitch> 60 </maxpitch>
  <minrpm>   1280 </minrpm>
  <maxrpm>   1600 </maxrpm>
  <ct_factor> 1.7 </ct_factor>
  <cp_factor> 1.7 </cp_factor>

  <table name="C_THRUST" type="internal">
      <tableData>
                -10         0       15       25       35       45       55       65       90
      -0.2      -0.1387   0.0782   0.2842   0.3482   0.3837   0.4050   0.3732   0.3198   0.0000
       0.0      -0.2061   0.0000   0.2842   0.3482   0.3837   0.4087   0.3820   0.3198   0.0000
       0.2      -0.2311   -0.0711   0.2453   0.3411   0.3783   0.4087   0.3820   0.3198   0.0000
       0.4      -0.2311   -0.1651   0.1847   0.3377   0.3712   0.4050   0.3820   0.3198   0.0000
       0.6      -0.2311   -0.2311   0.0978   0.3038   0.3553   0.3945   0.3766   0.3198   0.0000
       0.8      -0.2311   -0.2311   0.0054   0.2274   0.3448   0.3803   0.3766   0.3198   0.0000
       1.0      -0.2311   -0.2311   -0.0924   0.1387   0.3306   0.3607   0.3732   0.3198   0.0000
       1.2      -0.2311   -0.2311   -0.1901   0.0426   0.2717   0.3482   0.3732   0.3198   0.0000
       1.4      -0.2311   -0.2311   -0.2311   -0.0622   0.1955   0.3428   0.3661   0.3198   0.0000
       1.6      -0.2311   -0.2311   -0.2311   -0.1580   0.1066   0.3306   0.3590   0.3198   0.0000
       1.8      -0.2311   -0.2311   -0.2311   -0.2311   0.0179   0.2842   0.3482   0.3198   0.0000
       2.0      -0.2311   -0.2311   -0.2311   -0.2311   -0.0711   0.2220   0.3468   0.3198   0.0000
       2.2      -0.2311   -0.2311   -0.2311   -0.2311   -0.1600   0.1600   0.3411   0.3198   0.0000
       2.4      -0.2311   -0.2311   -0.2311   -0.2311   -0.2311   0.0853   0.2785   0.3198   0.0000
       2.6      -0.2311   -0.2311   -0.2311   -0.2311   -0.2311   0.0108   0.1762   0.2842   0.0000
       2.8      -0.2311   -0.2311   -0.2311   -0.2311   -0.2311   -0.0640   0.1154   0.2311   0.0000
       3.0      -0.2311   -0.2311   -0.2311   -0.2311   -0.2311   -0.1387   0.0605   0.1776   0.0000
       3.2      -0.2311   -0.2311   -0.2311   -0.2311   -0.2311   -0.2132   0.0054   0.1245   0.0000
       3.4      -0.2311   -0.2311   -0.2311   -0.2311   -0.2311   -0.2311   -0.0497   0.0711   0.0000
       3.6      -0.2311   -0.2311   -0.2311   -0.2311   -0.2311   -0.2311   -0.1049   0.0179   0.0000
       3.8      -0.2311   -0.2311   -0.2311   -0.2311   -0.2311   -0.2311   -0.1600   -0.0355   0.0000
       4.0      -0.2311   -0.2311   -0.2311   -0.2311   -0.2311   -0.2311   -0.2149   -0.0890   0.0000
       6.0      -0.2311   -0.2311   -0.2311   -0.2311   -0.2311   -0.2311   -0.2311   -0.2311   0.0000
      </tableData>
  </table>

  <table name="C_POWER" type="internal">
     <tableData>
               -10        0       15       25       35       45       55        65        90
      -0.2      0.0204   0.0406   0.1424   0.3233   0.5575   0.7929   0.9149   1.0125   1.0125
       0.0      0.0814   0.0204   0.1220   0.3013   0.5331   0.7929   0.9185   1.0125   1.0125
       0.2      0.1159   0.0326   0.1180   0.2806   0.5099   0.7929   0.9185   1.0125   1.0125
       0.4      0.1561   0.0711   0.1016   0.2586   0.4843   0.7929   0.9185   1.0125   1.0125
       0.6      0.1915   0.1077   0.0671   0.2403   0.4538   0.7770   0.9149   1.0125   1.0125
       0.8      0.2257   0.1443   0.0204   0.2037   0.4269   0.7417   0.9149   1.0125   1.0125
       1.0      0.2598   0.1793   0.0204   0.1427   0.4026   0.7039   0.9112   1.0125   1.0125
       1.2      0.2952   0.1433   -0.0671   0.0549   0.3562   0.6746   0.9051   1.0125   1.0125
       1.4      0.3294   0.2476   -0.1012   -0.0406   0.2745   0.6648   0.8941   1.0125   1.0125
       1.6      0.3635   0.2830   -0.1183   -0.1220   0.1732   0.6465   0.8746   0.9759   1.0125
       1.8      0.3989   0.3172   -0.1220   -0.2037   0.0509   0.5733   0.8478   0.9551   1.0125
       2.0      0.4330   0.3513   -0.1561   -0.2842   -0.0610   0.4879   0.8075   0.9356   1.0125
       2.2      0.4672   0.3867   -0.1915   -0.3660   -0.1830   0.3965   0.7831   0.8941   1.0125
       2.4      0.5026   0.4208   -0.2257   -0.4477   -0.3050   0.2830   0.7600   0.8746   1.0125
       2.6      0.5367   0.4550   -0.2598   -0.5282   -0.3867   0.1183   0.7417   0.8441   1.0125
       2.8      0.5709   0.4904   -0.2952   -0.6099   -0.4635   -0.0403   0.7258   0.8332   1.0125
       3.0      0.6063   0.5245   -0.3294   -0.6917   -0.5489   -0.1830   0.7014   0.8332   1.0125
       3.2      0.6404   0.5587   -0.3635   -0.7722   -0.6307   -0.3257   0.6563   0.8136   1.0125
       3.4      0.6746   0.5941   -0.3989   -0.8539   -0.7112   -0.4672   0.5087   0.7929   1.0125
       3.6      0.7100   0.6282   -0.4330   -0.9356   -0.7929   -0.6099   0.3574   0.7722   1.0125
       3.8      0.7441   0.6624   -0.4672   -1.0125   -0.8746   -0.7526   0.1988   0.7478   1.0125
       4.0      0.7783   0.6978   -0.5026   -1.0125   -1.0125   -0.8941   0.0403   0.6917   1.0125
       6.0      1.0125   1.0125   -1.0125   -1.0125   -1.0125   -1.0125   -1.0125   -0.6099   1.0125
     </tableData>
  </table>

</propeller>
