<?xml version="1.0"?>
<!--

Contra-rotating 10-foot props, here represented by a single prop.
The engine runs at 3200 rpm.

-->

<propeller name="prop">
  <ixx>  61.00 </ixx>
  <diameter unit="IN"> 120.0 </diameter>
  <numblades> 6 </numblades>
  <gearratio>  2.13 </gearratio>
  <minpitch> 20 </minpitch>
  <maxpitch> 60 </maxpitch>
  <minrpm>   1502 </minrpm>
  <maxrpm>   1876 </maxrpm>
  <ct_factor> 2.1 </ct_factor>
  <cp_factor> 1.0 </cp_factor>

 <!-- thrust coefficient as a function of advance ratio and blade angle -->
  <table name="C_THRUST" type="internal">
      <tableData>
                -10        0         15        25        35        45        55        65       90
      -0.2      -0.2064    0.1163    0.4229    0.5181    0.5710    0.6027    0.5553    0.4758   0.0000
       0.0      -0.3066    0.0000    0.4229    0.5181    0.5710    0.6082    0.5684    0.4758   0.0000
       0.2      -0.3438   -0.1057    0.3650    0.5075    0.5629    0.6082    0.5684    0.4758   0.0000
       0.4      -0.3438   -0.2457    0.2749    0.5024    0.5523    0.6027    0.5684    0.4758   0.0000
       0.6      -0.3438   -0.3438    0.1455    0.4521    0.5287    0.5870    0.5604    0.4758   0.0000
       0.8      -0.3438   -0.3438    0.0080    0.3383    0.5130    0.5659    0.5604    0.4758   0.0000
       1.0      -0.3438   -0.3438   -0.1375    0.2064    0.4919    0.5367    0.5553    0.4758   0.0000
       1.2      -0.3438   -0.3438   -0.2829    0.0634    0.4043    0.5181    0.5553    0.4758   0.0000
       1.4      -0.3438   -0.3438   -0.3438   -0.0926    0.2910    0.5100    0.5447    0.4758   0.0000
       1.6      -0.3438   -0.3438   -0.3438   -0.2351    0.1586    0.4919    0.5342    0.4758   0.0000
       1.8      -0.3438   -0.3438   -0.3438   -0.3438    0.0266    0.4229    0.5181    0.4758   0.0000
       2.0      -0.3438   -0.3438   -0.3438   -0.3438   -0.1057    0.3303    0.5160    0.4758   0.0000
       2.2      -0.3438   -0.3438   -0.3438   -0.3438   -0.2381    0.2381    0.5075    0.4758   0.0000
       2.4      -0.3438   -0.3438   -0.3438   -0.3438   -0.3438    0.1269    0.4145    0.4758   0.0000
       2.6      -0.3438   -0.3438   -0.3438   -0.3438   -0.3438    0.0161    0.2622    0.4229   0.0000
       2.8      -0.3438   -0.3438   -0.3438   -0.3438   -0.3438   -0.0952    0.1717    0.3438   0.0000
       3.0      -0.3438   -0.3438   -0.3438   -0.3438   -0.3438   -0.2064    0.0901    0.2643   0.0000
       3.2      -0.3438   -0.3438   -0.3438   -0.3438   -0.3438   -0.3172    0.0080    0.1852   0.0000
       3.4      -0.3438   -0.3438   -0.3438   -0.3438   -0.3438   -0.3438   -0.0740    0.1057   0.0000
       3.6      -0.3438   -0.3438   -0.3438   -0.3438   -0.3438   -0.3438   -0.1561    0.0266   0.0000
       3.8      -0.3438   -0.3438   -0.3438   -0.3438   -0.3438   -0.3438   -0.2381   -0.0529   0.0000
       4.0      -0.3438   -0.3438   -0.3438   -0.3438   -0.3438   -0.3438   -0.3197   -0.1324   0.0000
       6.0      -0.3438   -0.3438   -0.3438   -0.3438   -0.3438   -0.3438   -0.3438   -0.3438   0.0000
      </tableData>
  </table>

 <!-- power coefficient as a function of advance ratio and blade angle -->
  <table name="C_POWER" type="internal">
     <tableData>
               -10        0        15        25        35        45        55        65       90
      -0.2      0.0303   0.0604    0.2118    0.4810    0.8295    1.1798    1.3614    1.5066   1.5066
       0.0      0.1211   0.0303    0.1815    0.4483    0.7932    1.1798    1.3668    1.5066   1.5066
       0.2      0.1724   0.0485    0.1755    0.4175    0.7587    1.1798    1.3668    1.5066   1.5066
       0.4      0.2323   0.1058    0.1512    0.3848    0.7206    1.1798    1.3668    1.5066   1.5066
       0.6      0.2850   0.1603    0.0998    0.3576    0.6752    1.1562    1.3614    1.5066   1.5066
       0.8      0.3358   0.2147    0.0303    0.3031    0.6353    1.1036    1.3614    1.5066   1.5066
       1.0      0.3866   0.2668    0.0303    0.2124    0.5990    1.0473    1.3559    1.5066   1.5066
       1.2      0.4393   0.2133   -0.0998    0.0817    0.5300    1.0038    1.3468    1.5066   1.5066
       1.4      0.4901   0.3685   -0.1507   -0.0604    0.4084    0.9892    1.3305    1.5066   1.5066
       1.6      0.5409   0.4211   -0.1761   -0.1815    0.2577    0.9620    1.3015    1.4521   1.5066
       1.8      0.5935   0.4719   -0.1815   -0.3031    0.0757    0.8531    1.2615    1.4213   1.5066
       2.0      0.6444   0.5228   -0.2323   -0.4229   -0.0908    0.7261    1.2016    1.3922   1.5066
       2.2      0.6952   0.5754   -0.2850   -0.5445   -0.2723    0.5899    1.1653    1.3305   1.5066
       2.4      0.7478   0.6262   -0.3358   -0.6662   -0.4538    0.4211    1.1308    1.3015   1.5066
       2.6      0.7987   0.6770   -0.3866   -0.7860   -0.5754    0.1761    1.1036    1.2561   1.5066
       2.8      0.8495   0.7297   -0.4393   -0.9076   -0.6898   -0.0599    1.0800    1.2397   1.5066
       3.0      0.9021   0.7805   -0.4901   -1.0292   -0.8168   -0.2723    1.0437    1.2397   1.5066
       3.2      0.9529   0.8313   -0.5409   -1.1490   -0.9384   -0.4846    0.9765    1.2107   1.5066
       3.4      1.0038   0.8840   -0.5935   -1.2706   -1.0582   -0.6952    0.7569    1.1798   1.5066
       3.6      1.0564   0.9348   -0.6444   -1.3922   -1.1798   -0.9076    0.5318    1.1490   1.5066
       3.8      1.1072   0.9856   -0.6952   -1.5066   -1.3015   -1.1199    0.2959    1.1127   1.5066
       4.0      1.1581   1.0383   -0.7478   -1.5066   -1.5066   -1.3305    0.0599    1.0292   1.5066
       6.0      1.5066   1.5066   -1.5066   -1.5066   -1.5066   -1.5066   -1.5066   -0.9076   1.5066
     </tableData>
  </table>

<!-- thrust effects of helical tip Mach -->
<table name="CT_MACH" type="internal">
  <tableData>
    0.90   1.0
    1.10   0.9
  </tableData>
</table>

<!-- power-required effects of helical tip Mach -->
<table name="CP_MACH" type="internal">
  <tableData>
    0.90   1.0
    1.00   1.4
  </tableData>
</table>

</propeller>
